<?xml version="1.0"?>
<?xml-stylesheet type="text/xsl" href="http://jsbsim.sourceforge.net/JSBSim.xsl"?>

<fdm_config name="Boomy" version="2.0" release="ALPHA"
   xmlns:xsi="http://www.w3.org/2001/XMLSchema-instance"
   xsi:noNamespaceSchemaLocation="http://jsbsim.sourceforge.net/JSBSim.xsd">

 <fileheader>
  <author> Project Boom - Rohan Potdar, Aeromatic v 3.3.12 </author>
  <filecreationdate> 02 Feb 2021 </filecreationdate>
  <date> Last edited on 21 Feb 2021 </date>
  <version> 2 </version>
  <description> Project Boom - Aeromatic Generated Boomy.xml. </description>
 </fileheader>

 <!-- All unknowns are unchanged from aeromatic autgenerated values unless explicitly stated otherwise -->

<!--
	AEROMATIC RAW INPUT
	File:     Boomy.xml
	Inputs:
    name:          Boomy
    type:          Single engine Fighter Jet
    stall speed:   50.22kts
    max weight:    46.36 lb
    length:        5.53 ft
    wing:
     span:         3.34 ft
     area:         1.65 sq-ft
     mean chord:   1.38 ft
     aspect ratio: 6.75:1
     taper ratio:  0.10:1
     incidence:    0.00 degrees
     dihedral:     0.00 degrees
     sweep:        57.00 degrees

    no. engines:   1
    engine type:   Turbine Engine
    engine layout: aft fuselage

    control type:   Conventional Controls

    gear type:     tricycle
    steering type: steering
    retractable?:  yes

  Outputs:
    wing loading:       28.03 lb/sq-ft
     - thickness ratio: 0.00%
    payload:            6.15 lbs
    CL-alpha:           0.55 per radian
    CL-0:               -0.22
    CL-max:             3.28
    CD-0:               2.44
    K:                  0.12
    Mcrit:              0.81

    min. turn radius    123.26 ft
    max. turn rate:     0.76 deg/s
-->

 <metrics> <!-- Transfer moment arms to AeroRP -->
   <wingarea  unit="M2">     0.290 </wingarea>
   <wingspan  unit="M" >     1.018 </wingspan>
   <wing_incidence unit="DEG"> 0.00 </wing_incidence>
   <chord     unit="M" >     0.984 </chord>
   <htailarea unit="M2">     0.0308 </htailarea>
   <htailarm  unit="M" >    -0.788 </htailarm>
   <vtailarea  unit="M2">    0.0308 </vtailarea>
   <vtailarm  unit="M" >     0.614 </vtailarm>
   <location name="AERORP" unit="M">		<!-- From M>=0.75 sheet; this is what all your coefficients should be around, JSBSim transfers them to CG as neccessary -->
     <x>     -0.04422 </x>
     <y>      0.0000 </y>
     <z>      0.0000 </z>
   </location>
   <location name="EYEPOINT" unit="M">		<!-- G-Force calculation point for pilot; ignore; might be able to remove but keep for safety unless sure -->
     <x>    0.000 </x>
     <y>    0.000 </y>
     <z>    0.000 </z>
   </location>
   <location name="VRP" unit="M">		<!-- Vehicle Reference Point - Only relevant when using FlightGear -->
     <x>     0.0 </x>
     <y>     0.0 </y>
     <z>     0.0 </z>
   </location>
 </metrics>

 <mass_balance>   <!-- Current moment values are empty fuel -->
   <ixx unit="KG*M2">      0.216 </ixx>
   <iyy unit="KG*M2">      2.136 </iyy>
   <izz unit="KG*M2">      2.294 </izz>
   <emptywt unit="KG">     14.90 </emptywt>
   <location name="CG" unit="M">
     <x>     0.972 </x>
     <y>     0.00 </y>
     <z>     0.00 </z>
   </location>
 </mass_balance>

 <ground_reactions>
  <contact type="BOGEY" name="NOSE_GEAR">
   <location unit="M">
    <x> 0.35 </x>
    <y> 0 </y>
    <z> -0.15 </z>
   </location>
   <static_friction> 0.8 </static_friction>
   <dynamic_friction> 0.5 </dynamic_friction>
   <rolling_friction> 0.02 </rolling_friction>
   <spring_coeff unit="N/M"> 800 </spring_coeff>
   <damping_coeff unit="N/M/SEC"> 400 </damping_coeff>
   <max_steer unit="DEG"> 80 </max_steer>
   <brake_group> NOSE </brake_group>
   <retractable>1</retractable>
  </contact>
  <contact type="BOGEY" name="LEFT_GEAR">
   <location unit="M">
    <x> 1.10 </x>
    <y> -0.40 </y>
    <z> -0.15 </z>
   </location>
   <static_friction> 0.8 </static_friction>
   <dynamic_friction> 0.5 </dynamic_friction>
   <rolling_friction> 0.02 </rolling_friction>
   <spring_coeff unit="N/M"> 1400 </spring_coeff>
   <damping_coeff unit="N/M/SEC"> 200 </damping_coeff>
   <max_steer unit="DEG"> 0.0 </max_steer>
   <brake_group> LEFT </brake_group>
   <retractable>1</retractable>
  </contact>
  <contact type="BOGEY" name="RIGHT_GEAR">
   <location unit="M">
    <x> 1.10 </x>
    <y> 0.40 </y>
    <z> -0.15 </z>
   </location>
   <static_friction> 0.8 </static_friction>
   <dynamic_friction> 0.5 </dynamic_friction>
   <rolling_friction> 0.02 </rolling_friction>
   <spring_coeff unit="N/M"> 1400 </spring_coeff>
   <damping_coeff unit="N/M/SEC"> 200 </damping_coeff>
   <max_steer unit="DEG"> 0.0 </max_steer>
   <brake_group> RIGHT </brake_group>
   <retractable>1</retractable>
  </contact>
  <contact type="STRUCTURE" name="LEFT_WING">
   <location unit="M">
    <x> 1.10 </x>
    <y> -0.50 </y>
    <z> 0.00 </z>
   </location>
   <static_friction> 0.2 </static_friction>
   <dynamic_friction> 0.2 </dynamic_friction>
   <rolling_friction> 0.2 </rolling_friction>
   <spring_coeff unit="N/M"> 500 </spring_coeff>
   <damping_coeff unit="N/M/SEC"> 500 </damping_coeff>
  </contact>
  <contact type="STRUCTURE" name="RIGHT_WING">
   <location unit="M">
    <x> 1.10 </x>
    <y> 0.50 </y>
    <z> 0.00 </z>
   </location>
   <static_friction> 0.2 </static_friction>
   <dynamic_friction> 0.2 </dynamic_friction>
   <rolling_friction> 0.2 </rolling_friction>
   <spring_coeff unit="N/M"> 500 </spring_coeff>
   <damping_coeff unit="N/M/SEC"> 500 </damping_coeff>
  </contact>
 </ground_reactions>

 <propulsion>

    <engine file="p300">
    <location unit="M">
      <x>     1.25 </x>
      <y>     0.00 </y>
      <z>     0.00 </z>
    </location>
    <orient unit="DEG">
      <pitch>     0.00 </pitch>
       <roll>     0.00 </roll>
        <yaw>     0.00 </yaw>
    </orient>
    <feed> 0 </feed>

    <thruster file="direct">
     <sense> 1 </sense>
     <location unit="M">
       <x>     1.25 </x>	<!-- Approximate value near the back -->
       <y>     0.00 </y>
       <z>     0.00 </z>
     </location>
     <orient unit="DEG">
       <pitch>     0.00 </pitch>
        <roll>     0.00 </roll>
         <yaw>     0.00 </yaw>
     </orient>
    </thruster>
  </engine>

  <tank type="FUEL" number="0">	<!-- Only one fuel tank I beleive -->
     <location unit="M">		<!-- Placed at CG for now - please update -->
       <x>     0.972 </x>
       <y>     0.000 </y>
       <z>     0.000 </z>
     </location>
     <capacity unit="KG"> 6.00 </capacity>
     <contents unit="KG"> 6.00 </contents>
  </tank>

 </propulsion>

 <ground_reactions>

  <contact type="BOGEY" name="NOSE">
    <location unit="IN">
      <x>     8.62 </x>
      <y>     0.00 </y>
      <z>    -7.96 </z>
    </location>
    <static_friction>  0.80 </static_friction>
    <dynamic_friction> 0.50 </dynamic_friction>
    <rolling_friction> 0.02 </rolling_friction>
    <spring_coeff  unit="LBS/FT">     13.91 </spring_coeff>
    <damping_coeff unit="LBS/FT/SEC"> 6.95 </damping_coeff>
    <max_steer unit="DEG"> 5.00 </max_steer>
    <brake_group> NONE </brake_group>
    <retractable> 1 </retractable>
  </contact>

  <contact type="BOGEY" name="LEFT_MAIN">
    <location unit="IN">
      <x>   104.57 </x>
      <y>    -3.61 </y>
      <z>    -7.96 </z>
    </location>
    <static_friction>  0.80 </static_friction>
    <dynamic_friction> 0.50 </dynamic_friction>
    <rolling_friction> 0.02 </rolling_friction>
    <spring_coeff  unit="LBS/FT">     46.36 </spring_coeff>
    <damping_coeff unit="LBS/FT/SEC"> 23.18 </damping_coeff>
    <max_steer unit="DEG">0</max_steer>
    <brake_group> LEFT </brake_group>
    <retractable> 1 </retractable>
  </contact>

  <contact type="BOGEY" name="RIGHT_MAIN">
    <location unit="IN">
      <x>   104.57 </x>
      <y>     3.61 </y>
      <z>    -7.96 </z>
    </location>
    <static_friction>  0.80 </static_friction>
    <dynamic_friction> 0.50 </dynamic_friction>
    <rolling_friction> 0.02 </rolling_friction>
    <spring_coeff  unit="LBS/FT">     46.36 </spring_coeff>
    <damping_coeff unit="LBS/FT/SEC"> 23.18 </damping_coeff>
    <max_steer unit="DEG">0</max_steer>
    <brake_group> RIGHT </brake_group>
    <retractable> 1 </retractable>
  </contact>

  <contact type="STRUCTURE" name="LEFT_WING">
    <location unit="IN">
     <x>   100.55 </x>
     <y>   -20.04 </y>
     <z>    -1.66 </z>
    </location>
   <static_friction>  1 </static_friction>
   <dynamic_friction> 1 </dynamic_friction>
   <spring_coeff unit="LBS/FT">      46.36 </spring_coeff>
   <damping_coeff unit="LBS/FT/SEC"> 46.36 </damping_coeff>
  </contact>

  <contact type="STRUCTURE" name="RIGHT_WING">
    <location unit="IN">
     <x>   100.55 </x>
     <y>    20.04 </y>
     <z>    -1.66 </z>
    </location>
   <static_friction>  1 </static_friction>
   <dynamic_friction> 1 </dynamic_friction>
   <spring_coeff unit="LBS/FT">      46.36 </spring_coeff>
   <damping_coeff unit="LBS/FT/SEC"> 46.36 </damping_coeff>
  </contact>

 </ground_reactions>

 <aerodynamics>

  <axis name="LIFT">

    <function name="aero/force/Lift_alpha">			<!-- FIXME: Values for 0.1 are made up; some others look a bit shady e.g. all of M=0.7 should be higher I think -->
      <description>Lift due to alpha</description>
      <product>
          <property>aero/qbar-psf</property>
          <property>metrics/Sw-sqft</property>
          <table>
            <independentVar lookup="row">aero/alpha-deg</independentVar>
			<independentVar lookup="column">velocities/mach</independentVar>
            <tableData>
					0.1				0.3				0.5				0.7
				-8	-0.23976340051	-0.2748769035	-0.316141543	-0.3828169
				-3	-0.06166552793	-0.08849472518	-0.1042104699	-0.1881149
				2	0.066333954 	0.07985344752	0.09227948938	0.01569465477
				7	0.2387339012	0.2495874496	0.3064670956	0.2164789582
				12	0.3868915515	0.4173733774	0.455385058		0.4061997669
				17	0.4882973544	0.5383389038	0.6039227228	0.5734467743
            </tableData>
          </table>
      </product>
    </function>

    <function name="aero/force/Lift_pitch_rate">
        <description>Lift due to pitch rate</description>
        <product>
          <property>aero/qbar-psf</property>
          <property>metrics/Sw-sqft</property>
          <property>velocities/q-aero-rad_sec</property>
          <property>aero/ci2vel</property>
          <value> 5.2089 </value>
        </product>
      </function>

      <function name="aero/force/Lift_alpha_rate">
        <description>Lift due to alpha rate</description>
        <product>
           <property>aero/qbar-psf</property>
           <property>metrics/Sw-sqft</property>
           <property>aero/alphadot-rad_sec</property>
           <property>aero/ci2vel</property>
           <value> 2.3823 </value>
        </product>
      </function>

    <function name="aero/force/Lift_elevator">
       <description>Lift due to Elevator Deflection</description>
       <product>
           <property>aero/qbar-psf</property>
           <property>metrics/Sw-sqft</property>
           <property>fcs/elevator-pos-rad</property>
           <value> 0.5378 </value>
       </product>
    </function>

    <function name="aero/force/Lift_flap">
       <description>Delta Lift due to flaps</description>
       <product>
           <property>aero/qbar-psf</property>
           <property>metrics/Sw-sqft</property>
           <property>fcs/flap-pos-deg</property>
           <value> 0.0099 </value>
       </product>
    </function>


  </axis>

  <axis name="DRAG">

    <!-- CD0 is based on fuselage, wing, horizontal- en vertical tail -->
    <!-- Antennas, struts and wires are not taken into account        -->
    <!-- CD for gear (fixed and retractable) is defined below         -->
    <function name="aero/force/Drag_minimum">
       <description>Minimum drag</description>
        <product>
          <property>aero/qbar-psf</property>
          <property>metrics/Sw-sqft</property>
          <value> 0.012472 </value>
       </product>
    </function>

    <function name="aero/force/Drag_alpha">
       <description>Drag due to alpha</description>
       <product>
          <property>aero/qbar-psf</property>
          <property>metrics/Sw-sqft</property>
		  <table>
			<independentVar lookup="row">aero/alpha-deg</independentVar>
			<independentVar lookup="column">velocities/mach</independentVar>
            <tableData>
					0.1				0.3				0.5				0.7
				-8	0.033			0.03976340051	0.04649906181	0.05726257
				-3	0.011			0.01166552793	0.01314749555	0.02074335332
				2	0.012			0.0110333957	0.01241672081	0.01247228127
				7	0.027			0.02987339012	0.03952692937	0.02060622746
				12	0.079			0.08399357497	0.09437848307	0.058298882
				17	0.138			0.159593753		0.1806859284	0.1216733945
            </tableData>
          </table>
       </product>
    </function>

    <function name="aero/force/Drag_induced">
       <description>Induced drag</description>
         <product>
           <property>aero/qbar-psf</property>
           <property>metrics/Sw-sqft</property>
           <property>aero/cl-squared</property>
           <value> 0.0400 </value>
         </product>
    </function>

    <function name="aero/force/Drag_mach">
       <description>Drag due to mach</description>
        <product>
          <property>aero/qbar-psf</property>
          <property>metrics/Sw-sqft</property>
          <table>
            <independentVar lookup="row">velocities/mach</independentVar>
            <tableData>
                0.00    0.0000
                0.81    0.0000
                1.10    0.0230
                1.80    0.0150
            </tableData>
          </table>
        </product>
    </function>

    <function name="aero/force/Drag_beta">
       <description>Drag due to sideslip</description>
       <product>
          <property>aero/qbar-psf</property>
          <property>metrics/Sw-sqft</property>
          <table>
            <independentVar lookup="row">aero/beta-rad</independentVar>
            <tableData>
              -1.57    1.2300
              -0.26    0.0500
               0.00    0.0000
               0.26    0.0500
               1.57    1.2300
            </tableData>
          </table>
       </product>
    </function>

    <function name="aero/force/Drag_elevator">
       <description>Drag due to Elevator Deflection</description>
       <product>
           <property>aero/qbar-psf</property>
           <property>metrics/Sw-sqft</property>
           <abs><property>fcs/elevator-pos-rad</property></abs>
           <value> 0.0400 </value>
       </product>
    </function>

    <function name="aero/force/Drag_gear">
       <description>Drag due to gear</description>
         <product>
           <property>aero/qbar-psf</property>
           <property>metrics/Sw-sqft</property>
           <property>gear/gear-pos-norm</property>
           <value> 0.0200 </value>
         </product>
    </function>

    <function name="aero/force/Drag_flap">
       <description>Drag due to flaps</description>
         <product>
           <property>aero/qbar-psf</property>
           <property>metrics/Sw-sqft</property>
           <property>fcs/flap-pos-deg</property>
           <value> 0.0023 </value>
         </product>
    </function>


  </axis>

  <axis name="SIDE">

    <function name="aero/force/Side_beta">
       <description>Side force due to beta</description>
       <product>
           <property>aero/qbar-psf</property>
           <property>metrics/Sw-sqft</property>
           <property>aero/beta-rad</property>
           <value> 1.5891 </value>
       </product>
    </function>
    <function name="aero/force/Side_roll_rate">
       <description>Side force due to roll rate</description>
       <product>
           <property>aero/qbar-psf</property>
           <property>metrics/Sw-sqft</property>
           <property>aero/bi2vel</property>
           <property>velocities/p-aero-rad_sec</property>
           <table>
             <independentVar lookup="row">aero/Re</independentVar>
             <tableData>
                  746432  -1.0341
                  821076  -0.0867
                 1119649  -0.0385
             </tableData>
           </table>
       </product>
    </function>

    <function name="aero/force/Side_yaw_rate">
       <description>Side force due to yaw rate</description>
       <product>
           <property>aero/qbar-psf</property>
           <property>metrics/Sw-sqft</property>
           <property>aero/bi2vel</property>
           <property>velocities/r-aero-rad_sec</property>
           <value> -1.9169 </value>
       </product>
    </function>

    <function name="aero/force/Side_rudder">
       <description>Side force due to rudder</description>
       <product>
           <property>aero/qbar-psf</property>
           <property>metrics/Sw-sqft</property>
           <property>fcs/rudder-pos-rad</property>
           <value> 0.2820 </value>
       </product>
    </function>

  </axis>

  <axis name="PITCH">

    <function name="aero/moment/Pitch_alpha">
       <description>Pitch moment due to alpha</description>
       <product>
           <property>aero/qbar-psf</property>
           <property>metrics/Sw-sqft</property>
           <property>metrics/cbarw-ft</property>
           <table>
            <independentVar lookup="row">aero/alpha-deg</independentVar>
			<independentVar lookup="column">velocities/mach</independentVar>
            <tableData>
					0.1				0.3				0.5				0.7
				-8	0.0400			0.05038236499	0.05851795421	0.06842443572
				-3	0.0000			0.01783156553	0.0203095624	0.02840352615
				2	-0.011			-0.01254904696	-0.01355446643	0.0007018651187
				7	-0.052			-0.04788754724	-0.04925798115	-0.03112826299
				12	-0.077			-0.08151075808	-0.1013066704	-0.06821505873
				17	-0.094			-0.1041613393	-0.1355838714	-0.111192846
            </tableData>
          </table>
       </product>
    </function>

    <function name="aero/moment/Pitch_elevator">
       <description>Pitch moment due to elevator</description>
       <product>
          <property>aero/qbar-psf</property>
          <property>metrics/Sw-sqft</property>
          <property>metrics/cbarw-ft</property>
          <property>fcs/elevator-pos-rad</property>
          <table>
            <independentVar lookup="row">velocities/mach</independentVar>
            <tableData>
              0.0    1.0454
              2.0    0.2613
            </tableData>
          </table>
       </product>
    </function>

    <function name="aero/moment/Pitch_damp">
       <description>Pitch moment due to pitch rate</description>
       <product>
           <property>aero/qbar-psf</property>
           <property>metrics/Sw-sqft</property>
           <property>metrics/cbarw-ft</property>
           <property>aero/ci2vel</property>
           <property>velocities/q-aero-rad_sec</property>
           <value> 9.7440 </value>
       </product>
    </function>

    <function name="aero/moment/Pitch_alphadot">
       <description>Pitch moment due to alpha rate</description>
       <product>
           <property>aero/qbar-psf</property>
           <property>metrics/Sw-sqft</property>
           <property>metrics/cbarw-ft</property>
           <property>aero/ci2vel</property>
           <property>aero/alphadot-rad_sec</property>
           <value> 4.4564 </value>
       </product>
    </function>

  </axis>

  <axis name="ROLL">

    <function name="aero/moment/Roll_beta">
       <description>Roll moment due to beta</description>
       <product>
           <property>aero/qbar-psf</property>
           <property>metrics/Sw-sqft</property>
           <property>metrics/bw-ft</property>
           <property>aero/beta-rad</property>
           <!-- <property>fcs/gear-no-wow</property> -->
           <table>
             <independentVar lookup="row">aero/alpha-rad</independentVar>
             <independentVar lookup="column">aero/Re</independentVar>
             <tableData>
                           746432   821076  1119649-2147483648
                 -0.0349 -79.0109  -9.0032  -5.4455-nan(ind)
                  0.3491 -88.3173  -9.8461  -5.8600-nan(ind)
             </tableData>
           </table>
       </product>
    </function>

    <function name="aero/moment/Roll_damp">
       <description>Roll moment due to roll rate</description>
       <product>
           <property>aero/qbar-psf</property>
           <property>metrics/Sw-sqft</property>
           <property>metrics/bw-ft</property>
           <property>aero/bi2vel</property>
           <property>velocities/p-aero-rad_sec</property>
           <value> 0.2110 </value>
       </product>
    </function>

    <function name="aero/moment/Roll_yaw">
       <description>Roll moment due to yaw rate</description>
       <product>
           <property>aero/qbar-psf</property>
           <property>metrics/Sw-sqft</property>
           <property>metrics/bw-ft</property>
           <property>aero/bi2vel</property>
           <property>velocities/r-aero-rad_sec</property>
           <table>
             <independentVar lookup="row">aero/alpha-rad</independentVar>
             <independentVar lookup="column">aero/Re</independentVar>
             <tableData>
                           746432   821076  1119649-2147483648
                 -0.0349   0.5137   0.5137   0.5137   0.5137
                  0.3491   8.7833   1.2619   0.8797   0.5662
             </tableData>
           </table>
       </product>
    </function>

    <function name="aero/moment/Roll_aileron">
       <description>Roll moment due to aileron</description>
       <product>
          <property>aero/qbar-psf</property>
          <property>metrics/Sw-sqft</property>
          <property>metrics/bw-ft</property>
          <property>fcs/left-aileron-pos-rad</property>
           <table>
            <independentVar lookup="row">velocities/mach</independentVar>
            <tableData>
              0.0    0.1100
              2.0    0.0275
            </tableData>
          </table>
       </product>
    </function>

    <function name="aero/moment/Roll_rudder">
       <description>Roll moment due to rudder</description>
       <product>
           <property>aero/qbar-psf</property>
           <property>metrics/Sw-sqft</property>
           <property>metrics/bw-ft</property>
           <property>fcs/rudder-pos-rad</property>
           <value> 0.0100 </value>
       </product>
    </function>

  </axis>

  <axis name="YAW">

    <!-- Stall initiator -->
    <function name="aero/moment/Yaw_alpha">
       <description>Yaw moment due to alpha</description>
       <product>
           <property>aero/qbar-psf</property>
           <property>metrics/Sw-sqft</property>
           <property>metrics/bw-ft</property>
           <property>aero/alpha-rad</property>
           <!-- <property>fcs/gear-no-wow</property> -->
           <table>
             <independentVar lookup="row">aero/beta-rad</independentVar>
             <independentVar lookup="column">aero/Re</independentVar>
             <tableData>
                           746432   821076
                 -0.3491  -1.0000   0.0000
                  0.3491   1.0000   0.0000
             </tableData>
           </table>
       </product>
    </function>

    <function name="aero/moment/Yaw_beta">
       <description>Yaw moment due to beta</description>
       <product>
           <property>aero/qbar-psf</property>
           <property>metrics/Sw-sqft</property>
           <property>metrics/bw-ft</property>
           <property>aero/beta-rad</property>
           <value> -0.4606 </value>
       </product>
    </function>

    <function name="aero/moment/Yaw_roll_rate">
       <description>Yaw moment due to roll rate</description>
       <product>
           <property>aero/qbar-psf</property>
           <property>metrics/Sw-sqft</property>
           <property>metrics/bw-ft</property>
           <property>aero/bi2vel</property>
           <property>velocities/p-rad_sec</property>
           <table>
             <independentVar lookup="row">aero/Re</independentVar>
             <tableData>
                  746432   0.6237
                  821076   0.0523
                 1119649   0.0232
             </tableData>
           </table>
       </product>
    </function>

    <function name="aero/moment/Yaw_damp">
       <description>Yaw moment due to yaw rate</description>
       <product>
           <property>aero/qbar-psf</property>
           <property>metrics/Sw-sqft</property>
           <property>metrics/bw-ft</property>
           <property>aero/bi2vel</property>
           <property>velocities/r-aero-rad_sec</property>
           <value> 0.5507 </value>
       </product>
    </function>

    <function name="aero/moment/Yaw_rudder">
       <description>Yaw moment due to rudder</description>
       <product>
           <property>aero/qbar-psf</property>
           <property>metrics/Sw-sqft</property>
           <property>metrics/bw-ft</property>
           <property>fcs/rudder-pos-rad</property>
           <value> -0.1701 </value>
       </product>
    </function>

    <function name="aero/moment/Yaw_aileron">
       <description>Adverse yaw</description>
       <product>
           <property>aero/qbar-psf</property>
           <property>metrics/Sw-sqft</property>
           <property>metrics/bw-ft</property>
           <property>fcs/left-aileron-pos-rad</property>
           <value> 0.0000 </value>
       </product>
    </function>

  </axis>

 </aerodynamics>

 <external_reactions>
 </external_reactions>

</fdm_config>
