<?xml version="1.0"?>
<!--
    File:     ft_250.xml
    Author:   Simulation Team

    Inputs:
        name:           ft_250
        type:           turbine
        thrust:         240 N
        augmented?      no
        injected?       no
-->

<turbine_engine name="ft_250">
  <milthrust unit="{N}"> {250} </milthrust>
  <bypassratio>     0.0 </bypassratio>
  <tsfc>            0.74 </tsfc>
  <atsfc>           2.05 </atsfc>
  <idlen1>         40.0 </idlen1>
  <idlen2>         53.0 </idlen2>
  <maxn1>         100.0 </maxn1>
  <maxn2>         100.0 </maxn2>
  <injected>          0 </injected>

  <function name="IdleThrust">
   <table>
    <independentVar lookup="row">velocities/mach</independentVar>
    <independentVar lookup="column">atmosphere/density-altitude</independentVar>
    <tableData>
            0     1000    2000    3000    4000    5000    6000
     0.0  8.0000  0.0000  0.0000  0.0000  0.0000  0.0000  0.0
     0.2  0.0000  0.0000  0.0000  0.0000  0.0000  0.0000  0.0
     0.4  0.0000  0.0000  0.0000  0.0000  0.0000  0.0000  0.0
     0.6  0.0000  0.0000  0.0000  0.0000  0.0000  0.0000  0.0
     0.8  0.0000  0.0000  0.0000  0.0000  0.0000  0.0000  0.0
     1.0  0.0000  0.0000  0.0000  0.0000  0.0000  0.0000  0.0
    </tableData>
   </table>
  </function>

  <function name="MilThrust">
   <table>
    <independentVar lookup="row">velocities/mach</independentVar>
    <independentVar lookup="column">atmosphere/density-altitude</independentVar>
    <tableData>
            0     1000    2000    3000    4000    5000
     0.0  250.00  220.00  200.00  180.00  160.00  140.00
     0.2  220.00  200.00  180.00  160.00  140.00  140.00
     0.4  220.00  200.00  180.00  160.00  140.00  140.00
     0.6  220.00  200.00  200.00  180.00  160.00  140.00
     0.8  240.00  240.00  220.00  200.00  180.00  160.00
     1.0  300.00  280.00  240.00  220.00  200.00  200.00
     1.2  340.00  320.00  300.00  260.00  240.00  220.00
    </tableData>
   </table>
  </function>

</turbine_engine>
