<?xml version="1.0"?>
<?xml-stylesheet type="text/xsl" href="http://jsbsim.sourceforge.net/JSBSim.xsl"?>
<fdm_config name="boom" version="1.0" release="ALPHA"
   xmlns:xsi="http://www.w3.org/2001/XMLSchema-instance"
   xsi:noNamespaceSchemaLocation="http://jsbsim.sourceforge.net/JSBSim.xsd">

    <fileheader>
    <author> Simulation Team </author>
    <author> Project Boom </author>
    <filecreationdate> 7/27/2020 </filecreationdate>
    <version> 1.0 </version>
    <description> Models a F4N. </description>
        <note>
        This model is calibrated using both measured and simulated data.
        Below are the components comprising the aircraft configuration.

        FILE STRUCTURE:
        Notice that calling a file loads the element and populates its scope.
        The goal is to keep this initialization document as readable as possible.
        Below is an outline of this file

        CONFIGURATION:
        -- Body --
        1) Craft Metrics
        2) Mass balance

        -- Object Interactions --
        3) Ground Reactions
        4) External Reactions

        -- Flight --
        5) Propulsion
        5) Aerodynamics
        6) Systems, Autopilot, Flight Control

        -- Simulation Interfaces --
        7) PX4 Controller Input
        8) csv / FlightGear Output

        </note>
    </fileheader>

<!-- Craft Metrics -->
<metrics>

    <wingarea unit="IN2"> 165.6 </wingarea>
    <wingspan unit="IN"> 30 </wingspan>
    <chord unit="IN"> 17.09 </chord>
    <vtailarea unit="IN2"> 22.5 </vtailarea>
    <vtailarm unit="IN"> 18 </vtailarm>
</metrics>

<!-- Mass Balance -->
<mass_balance>
  <ixx unit="SLUG*FT2"> 65 </ixx>
  <iyy unit="SLUG*FT2"> 170 </iyy>
  <izz unit="SLUG*FT2"> 120 </izz>
  <ixy unit="SLUG*FT2"> 0 </ixy>
  <ixz unit="SLUG*FT2"> 0 </ixz>
  <iyz unit="SLUG*FT2"> 0 </iyz>
  <emptywt unit="LBS"> 60 </emptywt>
  <location name="CG" unit="IN">
      <x> 33 </x>
      <y> 0 </y>
      <z> 3 </z>
  </location>
</mass_balance>

<!-- Ground Reactions -->
<ground_reactions>

  <contact type="BOGEY" name="NOSE">
    <location unit="IN">
      <x>0</x>
      <y>0.0</y>
      <z>0</z>
    </location>
    <static_friction>  0.80 </static_friction>
    <dynamic_friction> 0.50 </dynamic_friction>
    <rolling_friction> 0.02 </rolling_friction>
    <spring_coeff unit="LBS/FT">       6723.00 </spring_coeff>
    <damping_coeff unit="LBS/FT/SEC">  2241.00 </damping_coeff>
    <max_steer unit="DEG">60.00</max_steer>
    <brake_group>NONE</brake_group>
    <retractable>1</retractable>
  </contact>

  <contact type="BOGEY" name="LEFT_MAIN">
    <location unit="IN">
      <x>0</x>
      <y>0</y>
      <z>0</z>
    </location>
    <static_friction>  0.80 </static_friction>
    <dynamic_friction> 0.50 </dynamic_friction>
    <rolling_friction> 0.02 </rolling_friction>
    <spring_coeff unit="LBS/FT">      22410.00 </spring_coeff>
    <damping_coeff unit="LBS/FT/SEC">  4482.00 </damping_coeff>
    <max_steer unit="DEG">0</max_steer>
    <brake_group>LEFT</brake_group>
    <retractable>1</retractable>
  </contact>

  <contact type="BOGEY" name="RIGHT_MAIN">
    <location unit="IN">
      <x>0</x>
      <y>0</y>
      <z>0</z>
    </location>
    <static_friction>  0.80 </static_friction>
    <dynamic_friction> 0.50 </dynamic_friction>
    <rolling_friction> 0.02 </rolling_friction>
    <spring_coeff unit="LBS/FT">      22410.00 </spring_coeff>
    <damping_coeff unit="LBS/FT/SEC">  4482.00 </damping_coeff>
    <max_steer unit="DEG">0</max_steer>
    <brake_group>RIGHT</brake_group>
    <retractable>1</retractable>
  </contact>

  <contact type="STRUCTURE" name="NOSE">
    <location unit="IN">
      <x>0</x>
      <y>0</y>
      <z>0</z>
    </location>
    <static_friction>0.80</static_friction>
    <dynamic_friction> 0.50 </dynamic_friction>
    <spring_coeff unit="LBS/FT">      22410.00 </spring_coeff>
    <damping_coeff unit="LBS/FT/SEC">  4482.00 </damping_coeff>
  </contact>

  <contact type="STRUCTURE" name="TAIL">
    <location unit="IN">
      <x>0</x>
      <y>0</y>
      <z>0</z>
    </location>
    <static_friction>  0.80 </static_friction>
    <dynamic_friction> 0.50 </dynamic_friction>
    <spring_coeff unit="LBS/FT">      22410.00 </spring_coeff>
    <damping_coeff unit="LBS/FT/SEC">  4482.00 </damping_coeff>
  </contact>

  <contact type="STRUCTURE" name="LEFT_WING">
    <location unit="IN">
      <x>0</x>
      <y>0</y>
      <z>0</z>
    </location>
    <static_friction>  0.80 </static_friction>
    <dynamic_friction> 0.50 </dynamic_friction>
    <spring_coeff unit="LBS/FT">      22410.00 </spring_coeff>
    <damping_coeff unit="LBS/FT/SEC">  4482.00 </damping_coeff>
  </contact>

  <contact type="STRUCTURE" name="RIGHT_WING">
    <location unit="IN">
      <x>0</x>
      <y>0</y>
      <z>0</z>
    </location>
    <static_friction>  0.80 </static_friction>
    <dynamic_friction> 0.50 </dynamic_friction>
    <spring_coeff unit="LBS/FT">      22410.00 </spring_coeff>
    <damping_coeff unit="LBS/FT/SEC">  4482.00 </damping_coeff>
  </contact>

</ground_reactions>

<!-- Propulsion -->
<propulsion>
    <engine file="K_70G4">
        <location unit="IN">
            <x> 51 </x>
            <y> 0 </y>
            <z> 0 </z>
        </location>
        <orient unit="DEG">
            <roll> 0 </roll>
            <pitch> 0 </pitch>
            <yaw> 0 </yaw>
        </orient>
        <feed>0</feed>
        <thruster file="direct">
            <location unit="IN">
                <x> 55 </x>
                <y> 0 </y>
                <z> 0 </z>
            </location>
            <orient unit="DEG">
                <roll> 0.0 </roll>
                <pitch> 0.0 </pitch>
                <yaw> 0.0 </yaw>
            </orient>
        </thruster>
    </engine>
    <tank type="FUEL">
        <location unit="IN">
            <x> 45 </x>
            <y> 0 </y>
            <z> 0 </z>
        </location>
        <capacity unit="LBS"> 10 </capacity>
        <contents unit="LBS"> 10 </contents>
    </tank>
</propulsion>

<!-- Flight Control-->
<flight_control name="FCS: boom">
    <channel name="Pitch">
        <summer name="Pitch Trim Sum">
            <input>fcs/elevator-cmd-norm</input>
            <input>fcs/pitch-trim-cmd-norm</input>
            <clipto>
                <min>-1</min>
                <max>1</max>
            </clipto>
        </summer>

        <aerosurface_scale name="Elevator Control">
            <input>fcs/pitch-trim-sum</input>
            <gain>0.01745</gain>
            <range>
                <min>-28</min>
                <max>23</max>
            </range>
            <output>fcs/elevator-pos-rad</output>
        </aerosurface_scale>

        <aerosurface_scale name="Elevator Position Normalized">
            <input>fcs/elevator-pos-deg</input>
            <domain>
                <min>-28</min>
                <max>23</max>
            </domain>
            <range>
                <min>-1</min>
                <max>1</max>
            </range>
            <output>fcs/elevator-pos-norm</output>
        </aerosurface_scale>
    </channel>
    <channel name="Roll">
        <summer name="Roll Trim Sum">
            <input>fcs/aileron-cmd-norm</input>
            <input>fcs/roll-trim-cmd-norm</input>
            <clipto>
                <min>-1</min>
                <max>1</max>
            </clipto>
        </summer>

        <aerosurface_scale name="Left Aileron Control">
            <input>fcs/roll-trim-sum</input>
            <gain>0.01745</gain>
            <range>
                <min>-20</min>
                <max>15</max>
            </range>
            <output>fcs/left-aileron-pos-rad</output>
        </aerosurface_scale>

        <aerosurface_scale name="Left Aileron Position Normalized">
            <input>fcs/left-aileron-pos-deg</input>
            <domain>
                <min>-20</min>
                <max>15</max>
            </domain>
            <range>
                <min>-1</min>
                <max>1</max>
            </range>
            <output>fcs/left-aileron-pos-norm</output>
        </aerosurface_scale>

        <aerosurface_scale name="Right Aileron Control">
            <input>fcs/roll-trim-sum</input>
            <gain>-0.01745</gain>
            <range>
                <min>-20</min>
                <max>15</max>
            </range>
            <output>fcs/right-aileron-pos-rad</output>
        </aerosurface_scale>

        <aerosurface_scale name="Right Aileron Position Normalized">
            <input>fcs/right-aileron-pos-deg</input>
            <domain>
                <min>-15</min>
                <max>20</max>
            </domain>
            <range>
                <min>1</min>
                <max>-1</max>
            </range>
            <output>fcs/right-aileron-pos-norm</output>
        </aerosurface_scale>
    </channel>
    <channel name="Yaw">
        <summer name="Yaw Trim Sum">
            <input>fcs/rudder-cmd-norm</input>
            <input>fcs/yaw-trim-cmd-norm</input>
            <clipto>
                <min>-1</min>
                <max>1</max>
            </clipto>
        </summer>

        <aerosurface_scale name="Rudder Control">
            <input>fcs/yaw-trim-sum</input>
            <gain>0.01745</gain>
            <range>
                <min>-16</min>
                <max>16</max>
            </range>
            <output>fcs/rudder-pos-rad</output>
        </aerosurface_scale>

        <aerosurface_scale name="Rudder Position Normalized">
            <input>fcs/rudder-pos-deg</input>
            <domain>
                <min>-16</min>
                <max>16</max>
            </domain>
            <range>
                <min>-1</min>
                <max>1</max>
            </range>
            <output>fcs/rudder-pos-norm</output>
        </aerosurface_scale>
    </channel>
    <channel name="Flaps">
        <kinematic name="Flaps Control">
            <input>fcs/flap-cmd-norm</input>
            <traverse>
                <setting>
                    <position>0</position>
                    <time>0</time>
                </setting>
                <setting>
                    <position>10</position>
                    <time>2</time>
                </setting>
                <setting>
                    <position>20</position>
                    <time>1</time>
                </setting>
                <setting>
                    <position>30</position>
                    <time>1</time>
                </setting>
            </traverse>
            <output>fcs/flap-pos-deg</output>
        </kinematic>
        <aerosurface_scale name="Flap Position Normalizer">
            <input>fcs/flap-pos-deg</input>
            <domain>
            <min>0</min>  <!-- Flaps actual minimum position -->
            <max>30</max>  <!-- Flaps actual maximum position -->
            </domain>
            <range>
            <min>0</min>  <!-- Flaps normalized minimum position -->
            <max>1</max>  <!-- Flaps normalized maximum position -->
            </range>
            <output>fcs/flap-pos-norm</output>
        </aerosurface_scale>
    </channel>
</flight_control>


<system file="BLC"/>
<system file="FCS-pitch"/>
<system file="FCS-roll"/>
<system file="FCS-yaw"/>
<system file="flaps"/>
<system file="chute"/>


<!-- Aerodynamics -->
 <aerodynamics>

 <function name="aero/function/kCLge">
   <description>Change_in_lift_due_to_ground_effect</description>
   <table>
     <independentVar>aero/h_b-mac-ft</independentVar>
     <tableData>
       0.0000    1.2290
       0.1000    1.1240
       0.1500    1.1160
       0.2000    1.1240
       0.3000    1.1050
       0.4000    1.0410
       0.5000    1.0340
       0.6000    1.0190
       0.7000    1.0080
       0.8000    1.0030
       0.9000    1.0010
       1.0000    1.0000
       1.1000    1.0000
     </tableData>
   </table>
 </function>

  <axis name="LIFT">

     <function name="aero/coefficient/CLo">
        <description>Lift_at_zero_alpha</description>
        <product>
          <property>aero/qbar-psf</property>
          <property>metrics/Sw-sqft</property>
          <property>aero/function/kCLge</property>
            <table>
              <independentVar>velocities/mach</independentVar>
              <tableData>
                0.4000  0.0100
                0.6000  0.0100
                0.8000  0.0100
                0.9000  0.0100
                1.0000  -0.0100
                1.2000  -0.0200
                1.4000  0.0400
                1.6000  0.0320
                1.8000  0.0200
                2.0000  0.0100
              </tableData>
            </table>
        </product>
      </function>

      <function name="aero/coefficient/CLalpha">
        <description>Lift_due_to_alpha</description>
        <product>
          <property>aero/qbar-psf</property>
          <property>metrics/Sw-sqft</property>
          <property>aero/alpha-rad</property>
          <property>velocities/mach</property>
          <property>aero/function/kCLge</property>
            <table>
              <independentVar>velocities/mach</independentVar>
              <tableData>
                0.4000  7.1154
                0.6000  4.8432
                0.8000  4.2637
                0.9000  4.3529
                1.0000  4.2055
                1.2000  3.1401
                1.4000  2.2916
                1.6000  1.7603
                1.8000  1.3831
                2.0000  1.1042
              </tableData>
            </table>
        </product>
      </function>

      <function name="aero/coefficient/CLDf">
        <description>Delta_lift_due_to_flap_deflection</description>
        <product>
          <property>aero/qbar-psf</property>
          <property>metrics/Sw-sqft</property>
          <property>aero/function/kCLge</property>
            <table>
              <independentVar lookup="row">velocities/mach</independentVar>
              <independentVar lookup="column">fcs/flap-pos-deg</independentVar>
              <tableData>
                        0.0000  7.0000  13.0000
                0.6500  0.0000  0.0890  0.4000
                0.7000  0.0000  0.0890  0.3810
                0.7500  0.0000  0.0990  0.3410
                0.8000  0.0000  0.1080  0.3520
                0.8500  0.0000  0.1280  0.3460
                0.9000  0.0000  0.1380  0.1390
                0.9500  0.0000  0.1280  0.2900
              </tableData>
            </table>
        </product>
      </function>

      <function name="aero/coefficient/CLDh">
        <description>Lift_due_to_Horizontal_tail_Deflection</description>
        <product>
          <property>aero/qbar-psf</property>
          <property>metrics/Sw-sqft</property>
          <property>fcs/elevator-pos-rad</property>
            <table>
              <independentVar>velocities/mach</independentVar>
              <tableData>
                0.2570  0.6800
                1.8000  0.5200
              </tableData>
            </table>
        </product>
      </function>

      <function name="aero/coefficient/CLq">
        <description>Lift_due_to_pitch_rate</description>
        <product>
          <property>aero/qbar-psf</property>
          <property>metrics/Sw-sqft</property>
          <property>velocities/q-aero-rad_sec</property>
          <property>aero/ci2vel</property>
            <table>
              <independentVar>velocities/mach</independentVar>
              <tableData>
                0.2570  2.3000
                1.8000  1.9000
              </tableData>
            </table>
        </product>
      </function>

      <function name="aero/coefficient/CLadot">
        <description>Lift_due_to_alpha_rate</description>
        <product>
          <property>aero/qbar-psf</property>
          <property>metrics/Sw-sqft</property>
          <property>aero/alphadot-rad_sec</property>
          <property>aero/ci2vel</property>
            <table>
              <independentVar>velocities/mach</independentVar>
              <tableData>
                0.2570  0.6600
                1.8000  0.8200
              </tableData>
            </table>
        </product>
      </function>

    <function name="aero/coefficient/dCLslat">
       <description>Delta_Lift_due_to_slats</description>
       <product>
           <property>aero/qbar-psf</property>
           <property>metrics/Sw-sqft</property>
		<table>
			<independentVar lookup="row">fcs/flap-pos-norm</independentVar>
			<tableData>
				0.00  0.025
				0.30  0.125
				1.00  0.25
			</tableData>
		</table>
       </product>
    </function>

    <function name="aero/coefficient/CLBLC">
       <description>Delta_Lift_due_to_BLC</description>
       <product>
           <property>systems/BLC/active</property>
           <value> 0.2 </value>
       </product>
    </function>

    <function name="aero/coefficient/dCLsb">
       <description>Delta_Lift_due_to_speedbrake</description>
       <product>
           <property>aero/qbar-psf</property>
           <property>metrics/Sw-sqft</property>
           <property>fcs/speedbrake-pos-norm</property>
           <value>0</value>
       </product>
    </function>

  </axis>

  <axis name="DRAG">

      <function name="aero/coefficient/CDo">
        <description>Drag_at_zero_lift</description>
        <product>
          <property>aero/qbar-psf</property>
          <property>metrics/Sw-sqft</property>
            <table>
              <independentVar>velocities/mach</independentVar>
              <tableData>
                0.0000  0.0160
                0.8000  0.0160
                0.8500  0.0163
                0.8800  0.0170
                0.9000  0.0170
                0.9250  0.0190
                0.9500  0.0230
                0.9750  0.0310
                1.0000  0.0380
                1.0500  0.0470
                1.1000  0.0500
                1.1500  0.0500
                1.2000  0.0490
                1.4000  0.0468
                1.6000  0.0440
                1.8000  0.0430
                2.0000  0.0422
              </tableData>
            </table>
        </product>
      </function>

      <function name="aero/coefficient/CDalpha">
        <description>Drag_due_to_alpha</description>
        <product>
          <property>aero/qbar-psf</property>
          <property>metrics/Sw-sqft</property>
            <table>
              <independentVar lookup="row">aero/alpha-rad</independentVar>
              <independentVar lookup="column">velocities/mach</independentVar>
              <tableData>
                        0.0000  0.8000  0.9000  1.0000  1.2000  1.4000  1.6000  1.8000  2.0000
                -0.0700 0.0034  0.0049  0.0059  0.0093  0.0109  0.0040  0.0035  0.0042  0.0041
                -0.0350 0.0010  0.0013  0.0015  0.0026  0.0032  0.0010  0.0011  0.0017  0.0018
                0.0000  0.0002  0.0002  0.0001  0.0002  0.0006  0.0011  0.0010  0.0008  0.0004
                0.0350  0.0024  0.0022  0.0031  0.0036  0.0046  0.0072  0.0059  0.0052  0.0037
                0.0700  0.0093  0.0118  0.0165  0.0195  0.0187  0.0243  0.0198  0.0161  0.0133
                0.1050  0.0240  0.0332  0.0465  0.0472  0.0425  0.0506  0.0430  0.0345  0.0176
                0.1400  0.0465  0.0589  0.0822  0.0860  0.0788  0.0837  0.0722  0.0593  0.0479
                0.1750  0.0703  0.0851  0.1361  0.1674  0.1298  0.1257  0.1052  0.0894  0.0741
                0.2090  0.1074  0.1205  0.1988  0.3273  0.2195  0.1945  0.1487  0.1220  0.1013
                0.2440  0.1679  0.1684  0.2999  0.6122  0.3791  0.3195  0.1529  0.1650  0.1331
              </tableData>
            </table>
        </product>
      </function>

      <function name="aero/coefficient/CDbeta">
       <description>Drag_due_to_sideslip</description>
       <product>
          <property>aero/qbar-psf</property>
          <property>metrics/Sw-sqft</property>
          <table>
            <independentVar lookup="row">aero/beta-rad</independentVar>
            <tableData>
              -1.57    1.230
              -0.26    0.050
               0.00    0.000
               0.26    0.050
               1.57    1.230
            </tableData>
          </table>
       </product>
    </function>

    <function name="aero/coefficient/CDdh">
       <description>Drag_due_to_Elevator_Deflection</description>
       <product>
           <property>aero/qbar-psf</property>
           <property>metrics/Sw-sqft</property>
           <abs><property>fcs/elevator-pos-norm</property></abs>
           <value>0.04</value>
       </product>
    </function>

    <function name="aero/coefficient/CDgear">
        <description>Drag_due_to_landing_gear</description>
        <product>
          <property>aero/qbar-psf</property>
          <property>metrics/Sw-sqft</property>
            <table>
              <independentVar>gear/gear-pos-norm</independentVar>
              <tableData>
                0.0000  0.0000
                0.3000  0.1000
                1.0000  0.0600
              </tableData>
            </table>
        </product>
      </function>

<function name="aero/coefficient/CDflap">
	<description>Drag_due_to_flaps</description>
	<product>
		<property>aero/qbar-psf</property>
		<property>metrics/Sw-sqft</property>
		<property>fcs/flap-pos-norm</property>
		<value>0.002679</value>
	</product>
</function>

<function name="aero/coefficient/CDslat">
	<description>Drag_due_to_slats</description>
	<product>
		<property>aero/qbar-psf</property>
		<property>metrics/Sw-sqft</property>
		<table>
			<independentVar lookup="row">fcs/flap-pos-norm</independentVar>
			<tableData>
				0.00  0.003
				0.30  0.015
				1.00  0.03
			</tableData>
		</table>
	</product>
</function>

    <function name="aero/coefficient/CDbc">
       <description>Drag_due_to_braking_chute</description>
         <product>
           <property>aero/qbar-psf</property>
           <property>metrics/Sw-sqft</property>
           <property>systems/chute/unfurl-norm</property>
           <value>.75</value>
         </product>
    </function>

    <function name="aero/coefficient/CDsb">
       <description>Drag_due_to_speedbrakes</description>
         <product>
           <property>aero/qbar-psf</property>
           <property>metrics/Sw-sqft</property>
           <property>fcs/speedbrake-pos-norm</property>
           <value>0.04</value>
         </product>
    </function>

  </axis>

  <axis name="SIDE">
      <function name="aero/coefficient/CYb">
        <description>Side_force_due_to_beta</description>
        <product>
          <property>aero/qbar-psf</property>
          <property>metrics/Sw-sqft</property>
          <property>aero/beta-rad</property>
            <table>
              <independentVar>velocities/mach</independentVar>
              <tableData>
                0.2570  -1.1800
                1.8000  -1.0450
              </tableData>
            </table>
        </product>
      </function>

      <function name="aero/coefficient/CYDr">
        <description>Side_force_due_to_rudder</description>
        <product>
          <property>aero/qbar-psf</property>
          <property>metrics/Sw-sqft</property>
          <property>fcs/rudder-pos-rad</property>
            <table>
              <independentVar>velocities/mach</independentVar>
              <tableData>
                0.2570  0.3290
                1.8000  0.0870
              </tableData>
            </table>
        </product>
      </function>
  </axis>

  <axis name="ROLL">

      <function name="aero/coefficient/Clb">
        <description>Roll_moment_due_to_beta</description>
        <product>
          <property>aero/qbar-psf</property>
          <property>metrics/Sw-sqft</property>
          <property>metrics/bw-ft</property>
          <property>aero/beta-rad</property>
            <table>
              <independentVar>velocities/mach</independentVar>
              <tableData>
                0.2570  -0.1750
                1.8000  -0.0930
              </tableData>
            </table>
        </product>
      </function>

      <function name="aero/coefficient/Clp">
        <description>Roll_moment_due_to_roll_rate_(roll_damping)</description>
        <product>
          <property>aero/qbar-psf</property>
          <property>metrics/Sw-sqft</property>
          <property>metrics/bw-ft</property>
          <property>aero/bi2vel</property>
          <property>velocities/p-rad_sec</property>
            <table>
              <independentVar>velocities/mach</independentVar>
              <tableData>
                0.2570  -0.2850
                1.8000  -0.2720
              </tableData>
            </table>
        </product>
      </function>

      <function name="aero/coefficient/Clr">
        <description>Roll_moment_due_to_yaw_rate</description>
        <product>
          <property>aero/qbar-psf</property>
          <property>metrics/Sw-sqft</property>
          <property>metrics/bw-ft</property>
          <property>aero/bi2vel</property>
          <property>velocities/r-rad_sec</property>
            <table>
              <independentVar>velocities/mach</independentVar>
              <tableData>
                0.2570  0.2650
                1.8000  0.1540
              </tableData>
            </table>
        </product>
      </function>

      <function name="aero/coefficient/ClDa">
        <description>Roll_moment_due_to_aileron</description>
        <product>
          <property>aero/qbar-psf</property>
          <property>metrics/Sw-sqft</property>
          <property>metrics/bw-ft</property>
          <property>fcs/left-aileron-pos-rad</property>
            <table>
              <independentVar>velocities/mach</independentVar>
              <tableData>
                0.2570  0.0392
                1.8000  0.0173
              </tableData>
            </table>
        </product>
      </function>

      <function name="aero/coefficient/ClDr">
        <description>Roll_moment_due_to_rudder</description>
        <product>
          <property>aero/qbar-psf</property>
          <property>metrics/Sw-sqft</property>
          <property>metrics/bw-ft</property>
          <property>fcs/rudder-pos-rad</property>
            <table>
              <independentVar>velocities/mach</independentVar>
              <tableData>
                0.2570  0.0448
                1.8000  0.0079
              </tableData>
            </table>
        </product>
      </function>

  </axis>

  <axis name="PITCH">

      <function name="aero/coefficient/Cmalpha">
        <description>Pitch_moment_due_to_alpha</description>
        <product>
          <property>aero/qbar-psf</property>
          <property>metrics/Sw-sqft</property>
          <property>metrics/cbarw-ft</property>
          <property>aero/alpha-rad</property>
            <table>
              <independentVar>velocities/mach</independentVar>
              <tableData>
                0.2570  -0.6440
                1.8000  -1.3080
              </tableData>
            </table>
        </product>
      </function>

      <function name="aero/coefficient/Cmo">
        <description>Pitching_moment_at_zero_alpha</description>
        <product>
          <property>aero/qbar-psf</property>
          <property>metrics/Sw-sqft</property>
          <property>metrics/cbarw-ft</property>
            <table>
              <independentVar>velocities/mach</independentVar>
              <tableData>
                0.2570   0.0300
                1.8000  -0.0280
              </tableData>
            </table>
        </product>
      </function>

    <function name="aero/coefficient/Cmde">
       <description>Pitch_moment_due_to_elevator</description>
       <product>
          <property>aero/qbar-psf</property>
          <property>metrics/Sw-sqft</property>
          <property>metrics/cbarw-ft</property>
          <property>fcs/elevator-pos-rad</property>
          <table>
            <independentVar lookup="row">velocities/mach</independentVar>
            <tableData>
              0.0     -0.800
              2.0     -0.200
            </tableData>
          </table>
       </product>
    </function>

      <function name="aero/coefficient/Cmq">
        <description>Pitch_moment_due_to_pitch_rate</description>
        <product>
          <property>aero/qbar-psf</property>
          <property>metrics/Sw-sqft</property>
          <property>metrics/cbarw-ft</property>
          <property>aero/ci2vel</property>
          <property>velocities/q-rad_sec</property>
            <table>
              <independentVar>velocities/mach</independentVar>
              <tableData>
                0.2570  -5.84
                1.8000  -4.83
              </tableData>
            </table>
        </product>
      </function>

      <function name="aero/coefficient/Cmadot">
        <description>Pitch_moment_due_to_alpha_rate</description>
        <product>
          <property>aero/qbar-psf</property>
          <property>metrics/Sw-sqft</property>
          <property>metrics/cbarw-ft</property>
          <property>aero/ci2vel</property>
          <property>aero/alphadot-rad_sec</property>
            <table>
              <independentVar>velocities/mach</independentVar>
              <tableData>
                0.2570  -1.6400
                1.8000  -2.0500
              </tableData>
            </table>
        </product>
      </function>

  </axis>

  <axis name="YAW">

    <function name="aero/coefficient/Cnb">
        <description>Yaw_moment_due_to_beta</description>
        <product>
          <property>aero/qbar-psf</property>
          <property>metrics/Sw-sqft</property>
          <property>metrics/bw-ft</property>
          <property>aero/beta-rad</property>
            <table>
              <independentVar>velocities/mach</independentVar>
              <tableData>
                0.2570  0.5070
                1.8000  0.2420
              </tableData>
            </table>
        </product>
      </function>

      <function name="aero/coefficient/Cnp">
        <description>Yaw_moment_due_to_roll_rate</description>
        <product>
          <property>aero/qbar-psf</property>
          <property>metrics/Sw-sqft</property>
          <property>metrics/bw-ft</property>
          <property>aero/bi2vel</property>
          <property>velocities/p-rad_sec</property>
            <table>
              <independentVar>velocities/mach</independentVar>
              <tableData>
                0.2570  -0.1440
                1.8000  -0.0930
              </tableData>
            </table>
        </product>
      </function>

      <function name="aero/coefficient/Cnr">
        <description>Yaw_moment_due_to_yaw_rate</description>
        <product>
          <property>aero/qbar-psf</property>
          <property>metrics/Sw-sqft</property>
          <property>metrics/bw-ft</property>
          <property>aero/bi2vel</property>
          <property>velocities/r-rad_sec</property>
            <table>
              <independentVar>velocities/mach</independentVar>
              <tableData>
                0.2570  -0.7530
                1.8000  -0.6490
              </tableData>
            </table>
        </product>
      </function>

      <function name="aero/coefficient/CnDr">
        <description>Yaw_moment_due_to_rudder</description>
        <product>
          <property>aero/qbar-psf</property>
          <property>metrics/Sw-sqft</property>
          <property>metrics/bw-ft</property>
          <property>fcs/rudder-pos-rad</property>
            <table>
              <independentVar>velocities/mach</independentVar>
              <tableData>
                0.2570  -0.1645
                1.8000  -0.0435
              </tableData>
            </table>
        </product>
      </function>

      <function name="aero/coefficient/CnDa">
        <description>Yaw_moment_due_to_aileron</description>
        <product>
          <property>aero/qbar-psf</property>
          <property>metrics/Sw-sqft</property>
          <property>metrics/bw-ft</property>
          <property>fcs/left-aileron-pos-rad</property>
            <table>
              <independentVar>velocities/mach</independentVar>
              <tableData>
                0.2570  0.0042
                1.8000  0.0025
              </tableData>
            </table>
        </product>
      </function>
  </axis>

 </aerodynamics>


<output name="boom_test.csv" type="CSV" rate="120">
  <property> propulsion/engine/advance-ratio </property>
  <property> propulsion/engine/prop-induced-velocity_fps </property>
  <property> aero/cl-squared </property>
  <property> aero/qbar-psf </property>
  <property> attitude/phi-rad </property>
  <property> position/h-sl-ft </property>
  <property> velocities/vc-kts </property>
  <property> fcs/throttle-cmd-norm </property>
  <property> fcs/elevator-cmd-norm </property>
  <property> fcs/pitch-trim-cmd-norm </property>
  <property> propulsion/total-fuel-lbs </property>
  <property> flight-path/gamma-rad </property>
  <property> accelerations/n-pilot-z-norm </property>
  <rates> ON </rates>
  <velocities> ON </velocities>
  <forces> ON </forces>
  <moments> ON </moments>
  <position> ON </position>
  <fcs> ON </fcs>
  <propulsion> OFF </propulsion>
  <aerosurfaces> ON </aerosurfaces>
  <fcs> ON </fcs>
  <ground_reactions> ON </ground_reactions>
</output>

</fdm_config>
