<?xml version="1.0" encoding="UTF-8"?>
<?xml-stylesheet type="text/xsl" href="http://jsbsim.sourceforge.net/JSBSimScript.xsl"?>
<runscript xmlns:xsi="http://www.w3.org/2001/XMLSchema-instance"
    xsi:noNamespaceSchemaLocation="http://jsbsim.sf.net/JSBSimScript.xsd"
    name="WaveRipper ground trim test">
  <description>For testing WaveRipper ground reactions</description>
  <use aircraft="WaveRipper" initialize="reset00"/>
  <run start="0.0" end="20" dt="0.00833333">
    <property value="0"> simulation/notify-time-trigger </property>

   <event name="On-ground trim">
      <description>The aircraft is trimmed on-ground.</description>
      <condition>simulation/sim-time-sec ge 10</condition>
      <set name="simulation/do_simple_trim" value="2"/>
      <notify/>
    </event>

	<event name="Repeating Notify" persistent="true">
      <description>Output message at 0.01 second intervals</description>
      <notify>
        <property>position/h-agl-ft</property>
	  	<property>accelerations/wdot-ft_sec2</property>
      </notify>
      <condition> simulation/sim-time-sec >= simulation/notify-time-trigger </condition>
      <set name="simulation/notify-time-trigger" value="2" type="FG_DELTA"/>
    </event>

  </run>

  <output name="output/wavereap_ground_test.csv" type="CSV" rate="10">
    <property> position/h-agl-ft </property>
	<property> accelerations/wdot-ft_sec2</property>
    <velocities> ON </velocities>
    <forces> ON </forces>
    <moments> ON </moments>
    <position> ON </position>
    <ground_reactions> ON </ground_reactions>
  </output>
</runscript>
